# min | avg | max | min | avg | max
# [component: outputs ExpN]
# [component: outputs SymbFit]
# [component: outputs NumFit]
77 %
# добавить саморегуляцию мутации в зависимости от сходимости
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v3(t) := ((t^5.25 + 0.84)^8.62*t + 0.97)^-1.59
87 %
v5(t) := ((((t + 0.23)^5.05*t^2.02 + t)^5.88*t + t)^1.77 + 1.01)^-0.62
v6(t) := ((((t + 0.2)^5*t^2 + t)^6*t + t)^2 + 1)^-0.7
90 %
v7(t) := ((((t + 0.2)^8.1*t + t)^4.28*t + t)^2 + 1.01)^-0.68
t := 0, 0.1 .. 1
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# до рефакторинга | после с заменой лучше | после с заменой любым | лучший
# 1000 loops | 1000 loops | 1000 loops | 150 loops
# 5 hours | 40 min | 32 min | 9 hours
# 77 % | 78 % | 77 % | с 87% до 90%
