# min | avg | max | min | avg | max
# [component: outputs NumFit]
# [component: outputs SymbFit]
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# [component: outputs Exp100]
# [component: outputs Exp50]
# [component: outputs Exp25]
# (h^(0.00859283)*x^(-5.16308)+1.7007*x)^(-0.863056)+0.523737
66.5 %
h2 := 0.637
h3 := 0.352
h1 := 1
v2(t) := (h2^0.0086*t^-5.163 + 1.7*t)^-0.863 + 0.524
66 %
v3(t) := (h3^0.0086*t^-5.163 + 1.7*t)^-0.863 + 0.524
66 %
v1(t) := (h1^0.0086*t^-5.163 + 1.7*t)^-0.863 + 0.524
66 %
v11(t) := ((1.43*t^-0.33 + 1.18)^-3.1 + h1)^-0.99*h1
76 %
v22(t) := ((1.43*t^-0.33 + 1.18)^-3.1 + h2)^-0.99*h2
v33(t) := ((1.43*t^-0.33 + 1.18)^-3.1 + h3)^-0.99*h3
a(h/d, h) := ((h/d)^0.0086*h^-5.163 + 1.7*h)^-0.863 + 0.524  # error: Здесь необходимо указать имя.
t := 0, 0.1 .. 1
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