# [component: outputs TabN]
min  # avg  # max
min
avg
max
# [component: outputs Tab]
# [component: outputs Fit]
# [component: outputs FitNUM]
# % | Символьная фитнесс-функция | % | Численная Фитнесс-функция
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v1(t) := ((-3.6*t^2 + 0.094*t + 2.48)^-2.98 + 1.19)^(-0.88*t)
v2(t) := (6.39*t^5.54 + 1)^-1.45  # (-1.8103*t+1.76001)^t-0.117923
v3(t) := (-1.81*t + 1.76)^t - 0.118
t := 0, 0.01 .. 1
# Экспериментальные данные и подобранная кривая
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