# min | avg | max | min | avg | max
# [component: outputs SymbFit]
# [component: outputs NumFit]
lim(tg) = pi/2  # error: Эта переменная не определена.
a(hd) := atan(1/(2*h_d)*(-(1 + 0.5*h_d) + sqrt((1 + 0.5*h_d)^2 + 4*h_d*(0.58*σ_сж/(σ_р - 0.5)))))*180/π  # error: Эта переменная не определена.
# (((3.83633*t^(5.04986)+0.844267*t)^(-5.05029)*t^(2)+5.80128*t)^(-2.30624)+h)^(-0.930226)*h with fit 77.7546
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a(h/d, h) := (((h/d)^2.55 + 1.22*h/d)^-0.23*h^0.09 + 0.52*h)^-0.4  # error: Здесь необходимо указать имя.
h1 := 1
h2 := 0.5
h3 := 0.25
h4 := 0.1
# [component: outputs Exp100]
# [component: outputs Exp50]
# [component: outputs Exp25]
# [component: outputs Exp10]
# ((1.4277*t^(-0.333921)+1.18237)^(-3.1033)+h)^(-0.998601)*h
h2 := 0.5
h3 := 0.25
h4 := 0.1
h1 := 1
71 %
71 %
v4(t) := ((h4^2.55 + 1.22*h4)^-0.23*t^0.09 + 0.52*t)^-0.4
71 %
v1(t) := ((h1^2.55 + 1.22*h1)^-0.23*t^0.09 + 0.52*t)^-0.4
71 %
v2(t) := ((h2^2.55 + 1.22*h2)^-0.23*t^0.09 + 0.52*t)^-0.4
v3(t) := ((h3^2.55 + 1.22*h3)^-0.23*t^0.09 + 0.52*t)^-0.4
v11(t) := ((1.43*t^-0.33 + 1.18)^-3.1 + h1)^-0.99*h1
76 %
v22(t) := ((1.43*t^-0.33 + 1.18)^-3.1 + h2)^-0.99*h2
v33(t) := ((1.43*t^-0.33 + 1.18)^-3.1 + h3)^-0.99*h3
v44(t) := ((1.43*t^-0.33 + 1.18)^-3.1 + h4)^-0.99*h4
t := 0.28, 0.285 .. 1
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