# min | avg | max | min | avg | max
# [component: outputs SymbFit]
# [component: outputs NumFit]
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# [component: outputs Exp600]
# [component: outputs Exp700]
# [component: outputs Exp800]
# (3.75969*t*vp+vp)^(-2.12923)*vp^(2.62316)*t^(1.48625)
vp1 := 600
vp2 := 700
vp3 := 800
v1(t) := (t + vp1 - 1.95)^-0.0011*vp1^0.0088*t^0.3
24 %
v2(t) := (t + vp2 - 1.95)^-0.0011*vp2^0.0088*t^0.3
24 %
v3(t) := (t + vp3 - 1.95)^-0.0011*vp3^0.0088*t^0.3
24 %
v11(t) := (3.76*t*vp1 + vp1)^-2.13*vp1^2.62*t^1.49
36 %
36 %
v22(t) := (3.76*t*vp2 + vp2)^-2.13*vp2^2.62*t^1.49
v33(t) := (3.76*t*vp3 + vp3)^-2.13*vp3^2.62*t^1.49
36 %
t := 0, 0.1 .. 1
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