# [component: outputs TabN]
min  # avg  # max
min
avg
max
# [component: outputs Tab]
# [component: outputs Fit]
# [component: outputs FitNUM]
# % | Символьная фитнесс-функция | % | Численная Фитнесс-функция
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# ((-3.6056*t^(2)+0.0936266*t+2.4859)^(-2.98122)+1.19091)^(-0.881819*t)
v(t) := (-4.38*t^2 + 3.62*t)^t
v2(t) := (-1.72*t + 1.51)^t
t := 0, 0.01 .. 1
v3(t) := ((-3.6*t^2 + 0.094*t + 2.5)^-3 + 1.19)^(-0.88*t)
sv(t) := (-3.6*t^2 + 0.094*t + 2.5)^-3
# Экспериментальные данные и подобранная кривая
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Pop
